// COMSOL Multiphysics 6.2.0.339 model "li_battery_2d_NMC-Gr.mph"
// Outline of the model tree

Parameters
  H = 1[mm]
  h1 = 0.5  // Share of heterogeneous region 1
  h2 = 1-h1  // Share of heterogeneous region 2
  w = 1[m]  // Width of the cell
  L_neg = 75e-6[m]  // Length of negative electrode
  L_sep = 16e-6[m]  // Length of separator
  L_pos = 62.5e-6[m]  // Length of positive electrode
  i_1C_theory = 36.6[A/m^2]  // 1C discharge current (from Li-fun NMC811)
  Ds_neg = 3.9e-14[m^2/s]  // Solid phase Li-diffusivity negative electrode
  Ds_pos = 1e-13[m^2/s]  // Solid phase Li-diffusivity positive electrode
  rp_neg = 12.5e-6[m]  // Particle radius negative electrode
  rp_pos = 8e-6[m]  // Particle radius positive electrode
  T = 298[K]  // Temperature
  epsl_pos1 = 0.4  // Electrolyte phase volume fraction, positive electrode
  epss_pos1 = 1-epsl_pos1-epss_ia_pos1  // Electrode phase volume fraction, positive electrode
  epss_ia_pos1 = 0.05  // Inactive phase volume fraction, positive electrode
  epsl_pos2 = 0.4  // Electrolyte phase volume fraction, positive electrode
  epss_pos2 = 1-epsl_pos2-epss_ia_pos2  // Electrode phase volume fraction, positive electrode
  epss_ia_pos2 = 0.05  // Inactive phase volume fraction, positive electrode
  epsl_sep = 0.4  // Separator porosity
  cl_0 = 1200[mol/m^3]  // Initial electrolyte salt concentration
  epsl_neg1 = 0.3  // Electrolyte phase volume fraction, negative electrode
  epss_neg1 = 1-epsl_neg1-epss_ia_neg1  // Solid phase vol-fraction negative electrode
  epss_ia_neg1 = 0.05  // Inactive phase volume fraction, negative
  epsl_neg2 = 0.3  // Electrolyte phase volume fraction, negative electrode
  epss_neg2 = 1-epsl_neg2-epss_ia_neg2  // Solid phase vol-fraction negative electrode
  epss_ia_neg2 = 0.05  // Inactive phase volume fraction, negative
  csmax_neg = 31507[mol/m^3]
  csmax_pos = 50060[mol/m^3]  // Max solid phase concentration, positive electrode
  cs0_neg = 14870[mol/m^3]  // Initial concentration negative active electrode material
  cs0_pos = 3900[mol/m^3]  // Initial concentration positive active electrode material
  Ks_neg = 100[S/m]  // Solid phase conductivity negative electrode
  Ks_pos = 100[S/m]  // Solid phase conductivity positive electrode
  i0_neg_ref = 0.11[mA/cm^2]  // Exchange current density at reference conditions, negative electrode
  Qhost_neg1 = h1*L_neg*epss_neg1*F_const*csmax_neg
  Qhost_neg2 = h2*L_neg*epss_neg2*F_const*csmax_neg
  i0_pos_ref = 0.08[mA/cm^2]  // Exchange current density at reference conditions, positive electrode
  cl_ref = 1200[mol/m^3]  // Reference electrolyte salt concentration
  cs_neg_ref = 14870[mol/m^3]  // Reference concentration negative active electrode material
  cs_pos_ref = 3900[mol/m^3]  // Reference concentration negative active electrode material
  k_neg = i0_neg_ref/(F_const*(cs_neg_ref[m^3/mol])^0.5*((csmax_neg-cs_neg_ref)[m^3/mol])^0.5)[mol/m^3]  // Rate constant, negative electrode
  k_pos = i0_pos_ref/(F_const*(cs_pos_ref[m^3/mol])^0.5*((csmax_pos-cs_pos_ref)[m^3/mol])^0.5)[mol/m^3]  // Rate constant, positive electrode
  Qhost_pos1 = h1*L_pos*epss_pos1*F_const*csmax_pos
  Qhost_pos2 = h2*L_pos*epss_pos2*F_const*csmax_pos
  brugg = 3.3  // Bruggeman coefficient
  C = 0.1  // C-rate factor for the parametric study
  Emax = 4.2[V]  // Maximum voltage
  Emin = 3.5[V]  // Minimum voltage
  LI_loss = 0.05  // Loss of lithium inventory respect theoretical value

Variables
  var1 "Variables 1"
    dch_filter = comp1.liion.cdc1.CC_DCH  // Discharge filter (for plotting)
    ch_filter = comp1.liion.cdc1.CC_CH  // Charge filter (for plotting)
    first_cycle_filter = round(comp1.liion.cdc1.cycle_counter)==0  // First cycle filter (for plotting)

Couplings
  intop1: Integration on domains 1, 2
  aveop1: Average on boundaries 6, 8

Geometry
  geom1 "Geometry 1" (2D, length unit m)
    r1: Rectangle "Rectangle N1" | size = {L_neg, H*h1}
    r2: Rectangle "Rectangle N2" | pos = {0, H*h1}; size = {L_neg, H*h2}
    r3: Rectangle "Rectangle Sep" | pos = {L_neg, 0}; size = {L_sep, H}
    r4: Rectangle "Rectangle P1" | pos = {L_neg+L_sep, 0}; size = {L_pos, H*h1}
    r5: Rectangle "Rectangle P2" | pos = {L_neg+L_sep, H*h1}; size = {L_pos, H*h2}
    fin: Finalize "Form Union"

Materials
  mat1: Common "Graphite, LixC6 MCMB (Negative, Li-ion Battery)" on domains 1, 2
    def "Basic"
      youngsmodulus = E_int(c/csmax)
      poissonsratio = nu_int(c/csmax)
      electricconductivity = 100[S/m]
      diffusion = 1.4523e-13*exp(68025.7/8.314*(1/(T_ref/1[K])-1/(T2/1[K])))[m^2/s]
      thermalconductivity = 1[W/(m*K)]
      heatcapacity = 750[J/(kg*K)]
      density = 2300[kg/m^3]
      csmax = 31507[mol/m^3]
      T_ref = 318[K]
      T2 = min(393.15,max(T,223.15))
      int1: Interpolation | funcname = E_int; table = {{0, 32.47}, {0.333, 28.56}, {0.5, 58.06}, {1, 108.67}}; fununit = GPa; argunit = 1
      int2: Interpolation | funcname = nu_int; table = {{0, 0.32}, {0.333, 0.39}, {0.5, 0.34}, {1, 0.24}}
    ElectrodePotential "Equilibrium potential"
      Eeq = Eeq_int1(soc)+dEeqdT_int1(soc)*(T-298[K])
      dEeqdT = dEeqdT_int1(soc)
      cEeqref = def.csmax
      soc = c/cEeqref
      int1: Interpolation
        funcname = Eeq_int1
        table = 
          {0, 2.781186612}
          {0.01, 1.520893224}
          {0.02, 0.893922607}
          {0.03, 0.581284406}
          {0.04, 0.42452844}
          {0.05, 0.344895805}
          {0.06, 0.303146342}
          {0.07, 0.279578072}
          {0.08, 0.264093089}
          {0.09, 0.251347845}
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        interp = piecewisecubic
        extrap = linear
        fununit = V
        defineinv = on
      int2: Interpolation | funcname = dEeqdT_int1; table = {{0, 3.0e-4}, {0.17, 0}, {0.24, -6e-5}, {0.28, -1.6e-4}, {0.5, -1.6e-4}, {0.54, -9e-5}, {0.71, -9e-5}, {0.85, -1.0e-4}, {1.0, -1.2e-4}}; fununit = V/K
    OperationalSOC "Operational electrode state of charge"
      socmax = elpot.Eeq_inv(E_min)
      socmin = elpot.Eeq_inv(E_max)
      E_max = 1[V]
      E_min = 0.075[V]
    ic "Intercalation strain"
      dvol = dVOLdSOL(c/def.csmax)
      int1: Interpolation
        funcname = dVOLdSOL
        table = 
          {0, 0}
          {0.00680272108844, 0.125}
          {0.0631681243926, 1.27364864865}
          {0.11175898931, 2.52364864865}
          {0.179786200194, 3.57094594595}
          {0.240038872692, 4.44932432432}
          {0.290573372206, 5.19256756757}
          {0.356656948494, 5.66554054054}
          {0.418853255588, 5.96959459459}
          {0.481049562682, 6.10472972973}
          {0.543245869776, 6.17364864865}
          {0.586005830904, 6.30608108108}
          {0.611273080661, 7.72635135135}
          {0.644314868805, 8.57094594595}
          {0.694849368319, 9.44932432432}
          {0.741496598639, 10.2939189189}
          {0.77648202138, 10.902027027}
          {0.823129251701, 11.5439189189}
          {0.854227405248, 12.152027027}
          {0.883381924198, 12.8277027027}
          {0.918367346939, 12.9966216216}
          {0.949465500486, 13.1655405405}
        extrap = linear
        fununit = %
        argunit = 1
    EquilibriumConcentration
      csEq = def.csmax*elpot.Eeq_inv(V)
  mat2: Common "NMC 811, LiNi0.8Mn0.1Co0.1O2 (Positive, Li-ion Battery)" on domains 4, 5
    def "Basic"
      electricconductivity = 0.17[S/m]
      diffusion = 5e-13*exp(1200*(1/(T_ref/1[K])-1/(T2/1[K])))[m^2/s]
      thermalconductivity = 1.58[W/(m*K)]
      heatcapacity = 840.1[J/(kg*K)]
      density = 4.87[g/cm^3]
      csmax = 50060[mol/m^3]
      T_ref = 298[K]
      T2 = min(393.15,max(T,223.15))
    ElectrodePotential "Equilibrium potential"
      Eeq = Eeq_int1(soc)+dEeqdT_int1(soc)*(T-298[K])
      dEeqdT = dEeqdT_int1(soc)
      cEeqref = def.csmax
      soc = c/cEeqref
      int1: Interpolation
        funcname = Eeq_int1
        table = 
          {0.222893034308, 4.25681795484}
          {0.23718770939, 4.22123858032}
          {0.250374270125, 4.19821621502}
          {0.263560830861, 4.18435458147}
          {0.276747391596, 4.17555545756}
          {0.289933952331, 4.16928758847}
          {0.303120513066, 4.16350186316}
          {0.316307073801, 4.15663131436}
          {0.329493634536, 4.14530093562}
          {0.342680195271, 4.13083662235}
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        interp = piecewisecubic
        extrap = linear
        fununit = V
        defineinv = on
      int2: Interpolation
        funcname = dEeqdT_int1
        table = 
          {0.220410330185, 0.0140149553747}
          {0.238805741263, 0.0179719518372}
          {0.254614297659, 0.0248880063396}
          {0.271620471964, 0.0340549051944}
          {0.282638556724, 0.0364049224694}
          {0.302039966846, 0.0269937595203}
          {0.314255669516, 0.0204315011919}
          {0.333657079638, 0.01172733584}
          {0.355214201996, 0.0148088719319}
          {0.36814847541, 0.0179144419478}
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        fununit = mV/K
    OperationalSOC "Operational electrode state of charge"
      socmax = elpot.Eeq_inv(E_min)
      socmin = elpot.Eeq_inv(E_max)
      E_max = 4.25[V]
      E_min = 3.5[V]
    ic "Intercalation strain"
      dvol = dVOLdSOL(c/elpot.cEeqref)
      int1: Interpolation
        funcname = dVOLdSOL
        table = 
          {1, 0}
          {0.887831407206, -0.0190880169671}
          {0.855880353501, -0.0954400848356}
          {0.827328348063, -0.197242841994}
          {0.791978246091, -0.290562036055}
          {0.762746430999, -0.358430540827}
          {0.732154996601, -0.426299045599}
          {0.704282800816, -0.502651113468}
          {0.670972127804, -0.57051961824}
          {0.634942216179, -0.638388123012}
          {0.608429639701, -0.71474019088}
          {0.579197824609, -0.833510074231}
          {0.550645819171, -0.986214209968}
          {0.519374575119, -1.10498409332}
          {0.489462950374, -1.20678685048}
          {0.459551325629, -1.34252386002}
          {0.425560842964, -1.51219512195}
          {0.397008837525, -1.68186638388}
          {0.365737593474, -1.85153764581}
          {0.335825968729, -2.10604453871}
          {0.309993201903, -2.49628844115}
          {0.274643099932, -3.12407211029}
          {0.244731475187, -3.92152704136}
          {0.213460231135, -4.82078472959}
          {0.182188987084, -5.66914103924}
          {0.150917743032, -6.53446447508}
        extrap = linear
        fununit = %
        argunit = 1
    EquilibriumConcentration
      csEq = def.csmax*elpot.Eeq_inv(V)
  mat3: Common "LiPF6 in 1:1 EC:DMC (Liquid, Li-ion Battery)" on domains 3
    def "Basic"
      diffusion = D(c/1[M],T/1[K])[cm^2/s]
      an1: Analytic | funcname = D; expr = 1.47e3*exp(1.33*c)*exp(-1.69e3/T)*exp(-5.63e2*c/T)*1e-6; args = {c, T}; argunit = {, }
    ElectrolyteConductivity
      sigmal = max(sigmal(c/1[M],T/1[K])[mS/cm],eps)
      an1: Analytic | funcname = sigmal; expr = 7.98e-1*(1+(T-2.28e2))*c*(1-1.22*sqrt(max(c,eps))+5.09e-1*(1-4e-3*exp(1000/T))*c)/(1+c^4*(3.79e-3*exp(1000/T))); args = {c, T}; argunit = {, }
    SpeciesProperties
      transpNum = t_plus(c/1[M],T/1[K])
      fcl = TDF(c/1[M],T/1[K])-1
      an1: Analytic | funcname = TDF; expr = -5.58+7.17*c+3.8e-2*T+1.91*c^2-6.65e-2*c*T-5.08e-5*T^2+1.1e-1*c^3-6.1e-3*c^2*T+1.51e-4*c*T^2; args = {c, T}; argunit = {, }
      an2: Analytic | funcname = t_plus; expr = -7.91+2.45e-1*c+5.28e-2*T+6.98e-1*c^2-1.08e-2*c*T-8.21e-5*T^2+7.43e-4*c^3-2.22e-3*c^2*T+3.07e-5*c*T^2; args = {c, T}; argunit = {, }

Physics
  liion: LithiumIonBatteryMPH "Lithium-Ion Battery" on all domains
    dependent variable phil
    dz.dz = w
    CellSettings.CellSOCandInitialChargeInventory = 1
    socicd1: SOCAndInitialChargeDistribution
      CellVoltageInputType = userdef
      Ecell_0SOC = Emin
      Ecell_100SOC = Emax
      InitialChargeType = CellVoltage
      Ecell_init = Emax
      SOC_init = 0
      AddFormationLoss = 1
      f_loss_neg = LI_loss
      neges1: NegElectrodeSelection "Negative Electrode Selection 1" on domains 1, 2
      poses1: PosElectrodeSelection "Positive Electrode Selection 1" on domains 4, 5
    sep1: Separator (default) | epsl = epsl_sep
    nf1: NoFlux (default)
    ins1: Insulation (default)
    init1: init "Initial Values 1" (default) | cl = cl_0
    sym1: Symmetry on boundaries 2, 5, 7, 9, 11, 14
    pce1: PorousElectrode "Porous Electrode N1" on domains 1
      ElectrolyteMaterial = mat3
      ElectrodeMaterial = mat1
      sigma_mat = userdef
      sigma = Ks_neg
      epsl = epsl_neg1
      epss = epss_neg1
      DiffusionCorrModel = Bruggeman
      pin1: ParticleIntercalation (default)
        ParticleMaterial = mat1
        rp = rp_neg
        SpeciesSettingsType = InitialSpeciesConcentration
      per1: PorousElectrodeReaction (default) | MaterialOption = mat1; ElectrodeKinetics = LithiumInsertion
    pce2: PorousElectrode "Porous Electrode N2" on domains 2
      ElectrolyteMaterial = mat3
      ElectrodeMaterial = mat1
      sigma_mat = userdef
      sigma = Ks_neg
      epsl = epsl_neg2
      epss = epss_neg2
      pin1: ParticleIntercalation (default)
        ParticleMaterial = mat1
        rp = rp_neg
        SpeciesSettingsType = InitialSpeciesConcentration
      per1: PorousElectrodeReaction (default) | MaterialOption = mat1; ElectrodeKinetics = LithiumInsertion
    pce3: PorousElectrode "Porous Electrode P1" on domains 4
      ElectrolyteMaterial = mat3
      ElectrodeMaterial = mat2
      sigma_mat = userdef
      sigma = Ks_pos
      epsl = epsl_pos1
      epss = epss_pos1
      pin1: ParticleIntercalation (default) | ParticleMaterial = mat2
      per1: PorousElectrodeReaction (default) | MaterialOption = mat2
    pce4: PorousElectrode "Porous Electrode P2" on domains 5
      ElectrolyteMaterial = mat3
      ElectrodeMaterial = mat2
      sigma_mat = userdef
      sigma = Ks_pos
      epsl = epsl_pos2
      epss = epss_pos2
      pin1: ParticleIntercalation (default) | ParticleMaterial = mat2
      per1: PorousElectrodeReaction (default) | MaterialOption = mat2
    egnd1: ElectricGround on boundaries 1, 3
    ec1: ElectrodeCurrent "Electrode Current Charge" on boundaries 15, 16
      ElectronicCurrentType = TotalCurrent
      Its = liion.I_1C_cell
      phis0init = Emin
      IncludeContactResistance = 0
    ec2: ElectrodeCurrent "Electrode Current Discharge" on boundaries 15, 16
      ElectronicCurrentType = TotalCurrent
      Its = -liion.I_1C_cell/10
      phis0init = Emax
      IncludeContactResistance = 0
    cdc1: ChargeDischargeCycling on boundaries 15, 16
      StartWith = Discharge_first
      Ich = liion.I_1C_cell
      Idch = -liion.I_1C_cell
      item.OCDCH = 0
      Vmax = Emax
      item.OCCH = 0
      Vmin = Emin
      trech = 600[s]
      tredch = 600[s]
      phis0init = Emin

Mesh
  mesh1 "Mesh 1" (physics-controlled)

Studies
  std1 "One Cycle DCH-CH"
    cdi: CurrentDistributionInitialization | disabledphysics = {liion/ec1, liion/ec2}
    time: Transient "Time Dependent" | tlist = range(0,10,6000); disabledphysics = {liion/ec1, liion/ec2}
  std2 "Discharge"
    cdi: CurrentDistributionInitialization
    time: Transient "Time Dependent" | tlist = range(0,200,36000); disabledphysics = {liion/ec1, liion/cdc1}

Solver configurations
  sol1 "Solution 1" (study std1)
    v1: Variables "Dependent Variables 1"
      comp1_cl: Field "Electrolyte salt concentration (comp1.cl)" | scalemethod = manual; scaleval = 1000
      comp1_phil: Field "Electrolyte potential (comp1.phil)" | scalemethod = manual; scaleval = 1
      comp1_phis: Field "Electric potential (comp1.phis)" | scalemethod = manual; scaleval = 1
      comp1_liion_cdc1_phis0: State "Cell potential (comp1.liion.cdc1.phis0)" | scalemethod = manual; scaleval = 1
    s1: Stationary "Stationary Solver 1" | stol = 1.0E-4
      fc1: FullyCoupled | linsolver = d1; minstep = 1.0E-6; maxiter = 50
      d1: Direct "Direct (liion)" | linsolver = pardiso
    su1: StoreSolution "Solution Store 1"
    v2: Variables "Dependent Variables 2" | initmethod = sol; notsolmethod = sol
      comp1_cl: Field "Electrolyte salt concentration (comp1.cl)" | scalemethod = manual; scaleval = 1000
      comp1_liion_pce1_cs: Field "Solid phase concentration (comp1.liion.pce1.cs)"
        scalemethod = manual
        scaleval = 10000
      comp1_liion_pce2_cs: Field "Solid phase concentration (comp1.liion.pce2.cs)"
        scalemethod = manual
        scaleval = 10000
      comp1_liion_pce3_cs: Field "Solid phase concentration (comp1.liion.pce3.cs)"
        scalemethod = manual
        scaleval = 10000
      comp1_liion_pce4_cs: Field "Solid phase concentration (comp1.liion.pce4.cs)"
        scalemethod = manual
        scaleval = 10000
      comp1_phil: Field "Electrolyte potential (comp1.phil)" | scalemethod = manual; scaleval = 1
      comp1_phis: Field "Electric potential (comp1.phis)" | scalemethod = manual; scaleval = 1
      comp1_liion_cdc1_phis0: State "Cell potential (comp1.liion.cdc1.phis0)" | scalemethod = manual; scaleval = 1
    t1: Time "Time-Dependent Solver 1"
      tlist = range(0,10,6000)
      rtol = 0.001
      initialstepbdf = (1)[s]
      maxorder = 2
      eventout = on
      se1: Segregated
        ss1: SegregatedStep "Battery Current Distribution"
          segvar = {comp1_phil, comp1_cl, comp1_phis, comp1_liion_phis_lm, comp1_liion_cdc1_CC_CH, comp1_liion_cdc1_CC_DCH, comp1_liion_cdc1_cycle_counter, comp1_liion_cdc1_phis0, comp1_liion_cdc1_end_cc_dch, comp1_liion_cdc1_end_cc_ch, comp1_liion_cdc1_t_dch_start, comp1_liion_cdc1_t_ch_start}
          linsolver = d1
          subjtech = onevery
        ss2: SegregatedStep "Insertion Particle Concentration Variables" | segvar = {comp1_liion_pce1_cs}; linsolver = d1
        ss3: SegregatedStep "Insertion Particle Concentration Variables (2)"
          segvar = {comp1_liion_pce2_cs}
          linsolver = d1
        ss4: SegregatedStep "Insertion Particle Concentration Variables (3)"
          segvar = {comp1_liion_pce3_cs}
          linsolver = d1
        ss5: SegregatedStep "Insertion Particle Concentration Variables (4)"
          segvar = {comp1_liion_pce4_cs}
          linsolver = d1
      d1: Direct "Direct (liion)" | linsolver = pardiso
      st1: StopCondition
        stopcondterminateon = true
        stopconddesc = Stop expression 1
        stopcondarr = comp1.liion.cdc1.phis0 <= Emin
  sol2 "Solution Store 1" (study std1)
  sol3 "Solution 3" (study std2)
    v1: Variables "Dependent Variables 1"
      comp1_cl: Field "Electrolyte Salt Concentration (comp1.cl)" | scalemethod = manual; scaleval = 1000
      comp1_phil: Field "Electrolyte Potential (comp1.phil)" | scalemethod = manual; scaleval = 1
      comp1_phis: Field "Electric Potential (comp1.phis)" | scalemethod = manual; scaleval = 1
      comp1_liion_cdc1_phis0: State "Cell Potential (comp1.liion.cdc1.phis0)" | scalemethod = manual; scaleval = 1
    s1: Stationary "Stationary Solver 1" | stol = 1.0E-4
      fc1: FullyCoupled | linsolver = d1; minstep = 1.0E-6; maxiter = 50
      d1: Direct "Direct (liion)" | linsolver = pardiso
    su1: StoreSolution "Solution Store 2"
    v2: Variables "Dependent Variables 2" | initmethod = sol; notsolmethod = sol
      comp1_cl: Field "Electrolyte Salt Concentration (comp1.cl)" | scalemethod = manual; scaleval = 1000
      comp1_liion_pce1_cs: Field "Solid Phase Concentration (comp1.liion.pce1.cs)"
        scalemethod = manual
        scaleval = 10000
      comp1_liion_pce2_cs: Field "Solid Phase Concentration (comp1.liion.pce2.cs)"
        scalemethod = manual
        scaleval = 10000
      comp1_liion_pce3_cs: Field "Solid Phase Concentration (comp1.liion.pce3.cs)"
        scalemethod = manual
        scaleval = 10000
      comp1_liion_pce4_cs: Field "Solid Phase Concentration (comp1.liion.pce4.cs)"
        scalemethod = manual
        scaleval = 10000
      comp1_phil: Field "Electrolyte Potential (comp1.phil)" | scalemethod = manual; scaleval = 1
      comp1_phis: Field "Electric Potential (comp1.phis)" | scalemethod = manual; scaleval = 1
      comp1_liion_ec2_phis0: State "Electric Potential on Boundary (comp1.liion.ec2.phis0)"
        scalemethod = manual
        scaleval = 1
    t1: Time "Time-Dependent Solver 1"
      tlist = range(0,200,36000)
      rtol = 0.001
      initialstepbdf = (1)[s]
      maxorder = 2
      eventout = on
      se1: Segregated
        ss1: SegregatedStep "Battery Current Distribution"
          segvar = {comp1_phil, comp1_cl, comp1_phis, comp1_liion_ec2_phis0}
          linsolver = d1
          subjtech = onevery
        ss2: SegregatedStep "Insertion Particle Concentration Variables" | segvar = {comp1_liion_pce1_cs}; linsolver = d1
        ss3: SegregatedStep "Insertion Particle Concentration Variables (2)"
          segvar = {comp1_liion_pce2_cs}
          linsolver = d1
        ss4: SegregatedStep "Insertion Particle Concentration Variables (3)"
          segvar = {comp1_liion_pce3_cs}
          linsolver = d1
        ss5: SegregatedStep "Insertion Particle Concentration Variables (4)"
          segvar = {comp1_liion_pce4_cs}
          linsolver = d1
      d1: Direct "Direct (liion)" | linsolver = pardiso
      st1: StopCondition
        stopcondterminateon = true
        stopconddesc = Stop expression 1
        stopcondarr = comp1.liion.phis0_ec2 <= Emin
  sol4 "Solution Store 2" (study std2)

Datasets
  dset1: Solution | solution = sol1
  dset2: Solution | solution = sol2
  dset3: Solution | solution = sol3
  dset4: Solution | solution = sol4

Plots
  pg1: PlotGroup1D "Cell and Average Electrode Cell State of Charge (liion)" | data = dset1; ylabel = SOC (1)
    glob1: Global | expr = liion.SOC_cell; unit = 1; descr = Cell state of charge
    glob2: Global
      expr = {liion.soc_average_pce1, liion.soc_average_pce2, liion.soc_average_pce3, liion.soc_average_pce4}
      unit = {1, 1, 1, 1}
      descr = {"Average SOC, Porous Electrode N1", "Average SOC, Porous Electrode N2", "Average SOC, Porous Electrode P1", "Average SOC, Porous Electrode P2"}
  pg8: PlotGroup1D "Cell Voltage (liion)" | data = dset1; ylabel = SOC (1)
    glob1: Global | expr = liion.cdc1.phis0; unit = V; descr = Cell potential
  pg7: PlotGroup1D "LPP vs time" | data = dset1; xlabel = Time (s); ylabel = LPP (V)
    ptgr1: PointGraph on points 4-6 | expr = phis-phil; legends = {Region 1, Interface, Region 2}
    glob1: Global | expr = aveop1(phis-phil); legends = Average
  pg9: PlotGroup1D "Cell Discharge (liion)" | data = dset1; xlabel = Time (s); ylabel = Voltage (V)
    glob1: Global
      expr = liion.cdc1.phis0
      unit = V
      descr = Cell potential
      xdata = expr
      xdataexpr = (t-liion.cdc1.t_dch_start)
      filt1: GlobalFilter "Filter 1" | expr = dch_filter
  pg10: PlotGroup1D "Cell Charge (liion) 1" | data = dset1; xlabel = Time (s); ylabel = Voltage (V)
    glob1: Global
      expr = liion.cdc1.phis0
      unit = V
      descr = Cell potential
      xdata = expr
      xdataexpr = (t-liion.cdc1.t_ch_start)
      filt1: GlobalFilter "Filter 1" | expr = ch_filter
  pg2: PlotGroup2D "Electrolyte Potential (liion)" | data = dset1
    surf1: Surface | expr = phil
    arws1: ArrowSurface | expr = {liion.Ilx, liion.Ily}
  pg3: PlotGroup2D "Electrolyte Current Density (liion)" | data = dset1
    arws1: ArrowSurface | expr = {liion.Ilx, liion.Ily}
      col1: Color "Color Expression 1" | expr = root.comp1.liion.IlMag
  pg4: PlotGroup2D "Electrode Potential with Respect to Ground (liion)" | data = dset1
    surf1: Surface | expr = phis
    arws1: ArrowSurface | expr = {liion.Isx, liion.Isy}
  pg5: PlotGroup2D "Electrode Current Density (liion)" | data = dset1
    arws1: ArrowSurface | expr = {liion.Isx, liion.Isy}
      col1: Color "Color Expression 1" | expr = root.comp1.liion.IsMag
  pg6: PlotGroup2D "Electrolyte Salt Concentration (liion)" | data = dset1
    surf1: Surface | expr = cl
    arws1: ArrowSurface | expr = {liion.Nposx, liion.Nposy}
    arws2: ArrowSurface | expr = {liion.Nnegx, liion.Nnegy}
  pg18: PlotGroup1D "(DCH) Cell Voltage (liion)" | data = dset3; ylabel = SOC (1)
    glob1: Global | expr = liion.phis0_ec2; unit = V; descr = Electric potential on boundary
  pg11: PlotGroup1D "Boundary Electrode Potential with Respect to Ground (liion)" | data = dset3
    glob1: Global | expr = liion.phis0_ec2; unit = V; descr = Electric potential on boundary
  pg12: PlotGroup1D "Cell and Average Electrode Cell State of Charge (liion) 1" | data = dset3; ylabel = SOC (1)
    glob1: Global | expr = liion.SOC_cell; unit = 1; descr = Cell state of charge
    glob2: Global
      expr = {liion.soc_average_pce1, liion.soc_average_pce2, liion.soc_average_pce3, liion.soc_average_pce4}
      unit = {1, 1, 1, 1}
      descr = {"Average SOC, Porous Electrode N1", "Average SOC, Porous Electrode N2", "Average SOC, Porous Electrode P1", "Average SOC, Porous Electrode P2"}
  pg13: PlotGroup2D "Electrolyte Potential (liion) 1" | data = dset3
    surf1: Surface | expr = phil
    arws1: ArrowSurface | expr = {liion.Ilx, liion.Ily}
  pg14: PlotGroup2D "Electrolyte Current Density (liion) 1" | data = dset3
    arws1: ArrowSurface | expr = {liion.Ilx, liion.Ily}
      col1: Color "Color Expression 1" | expr = root.comp1.liion.IlMag
  pg15: PlotGroup2D "Electrode Potential with Respect to Ground (liion) 1" | data = dset3
    surf1: Surface | expr = phis
    arws1: ArrowSurface | expr = {liion.Isx, liion.Isy}
  pg16: PlotGroup2D "Electrode Current Density (liion) 1" | data = dset3
    arws1: ArrowSurface | expr = {liion.Isx, liion.Isy}
      col1: Color "Color Expression 1" | expr = root.comp1.liion.IsMag
  pg17: PlotGroup2D "Electrolyte Salt Concentration (liion) 1" | data = dset3
    surf1: Surface | expr = cl
    arws1: ArrowSurface | expr = {liion.Nposx, liion.Nposy}
    arws2: ArrowSurface | expr = {liion.Nnegx, liion.Nnegy}

Exports
  data1: Data "Discharge"
    data = dset3
    expr = {liion.SOC_cell, comp1.liion.phis0_ec2}
    unit = {1, V}
    descr = {Cell state of charge, Electric potential on boundary}
    filename = C:\Users\giant\PycharmProjects\NOUBAL_COMSOL\noubal\Discharge.txt
    sdim = global
    separator = ;